*HEADING
cubit(defect1.inp): 01/26/2016: 15:55:01
version: 13.2
**
********************************** P A R T S **********************************
*PART, NAME=Part-Default
**
********************************** N O D E S **********************************
*NODE, NSET=ALLNODES
       1,   -9.500000e+00,   -9.990000e+00
       2,   -9.172130e+00,   -9.990000e+00
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**
********************************** E L E M E N T S ****************************
*ELEMENT, TYPE=S4R, ELSET=PART-DEFAULT_1_PROPERTY_GROUP_1
       1,       1,       2,       3,       4
       2,       4,       3,       5,       6
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**
********************************** N O D E S E T S **********************************
*NSET, NSET=PART-DEFAULT_1_ALLNODES
       1,    1142,      16,    2051,       2,      63
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*NSET, NSET=NS2
      16,      13,      23,      27,      29,      31
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*NSET, NSET=NS3
    2051,    2049,    2045,    2039,    2031,    2021
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*NSET, NSET=NS4
    1142,    1143,    1204,    1263,    1318,    1371
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**
********************************** P R O P E R T I E S ************************
*SHELL SECTION, ELSET=PART-DEFAULT_1_PROPERTY_GROUP_1, SECTION INTEGRATION=SIMPSON, MATERIAL=DEFAULT-STEEL
0.000000e+00
**
*END PART
**
**
**
********************************** E N D   P A R T S **********************************
**
**
********************************** A S S E M B L Y ************************************
**
*ASSEMBLY, NAME=ASSEMBLY1
**
*INSTANCE, NAME=Part-Default_1, PART=Part-Default
*END INSTANCE
**
*END ASSEMBLY
**
**
**
*MATERIAL, NAME = DEFAULT-STEEL
*ELASTIC, TYPE=ISOTROPIC
2.068000e+05, 2.900000e-01
*DENSITY
7.000000e-06
*CONDUCTIVITY,TYPE=ISO
4.500000e-02
*SPECIFIC HEAT
5.000000e+02
**
*MATERIAL, NAME = DEFAULT-STEEL
*ELASTIC, TYPE=ISOTROPIC
2.068000e+05, 2.900000e-01
*DENSITY
7.000000e-06
*CONDUCTIVITY,TYPE=ISO
4.500000e-02
*SPECIFIC HEAT
5.000000e+02
**
**
************************************** H I S T O R Y *************************************
**
*PREPRINT
**
**************************************** S T E P 1 ***************************************
*STEP,INC=100,NAME=DEFAULT SET
**
*STATIC
1, 1, 1e-05, 1
**
**
**
**
*END STEP
**
**************************************** S T E P 2 ***************************************
*STEP,INC=100,NAME=DEFAULT SET
**
*STATIC
1, 1, 1e-05, 1
**
**
**
**
*END STEP
