*HEADING
cubit(airhole_2D_mesh1.inp): 02/28/2014: 11:13:12
version: 13.2
**
********************************** P A R T S **********************************
*PART, NAME=Part-Default
**
********************************** N O D E S **********************************
*NODE, NSET=ALLNODES
       1,    1.000000e+01,    0.000000e+00,    0.000000e+00
       2,    1.000000e+01,    9.090909e-01,    0.000000e+00
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**
********************************** E L E M E N T S ****************************
*ELEMENT, TYPE=S4R, ELSET=EB4
       1,       1,       2,       3,       4
       2,       2,       5,       6,       3
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**
********************************** N O D E S E T S **********************************
*NSET, NSET=NS1
      25,      26,      29,      31,      33,      35,
      37,      39,      41,
*NSET, NSET=NS2
      23,      24,      57,      59,      61,      63,
      65,      67,      69,      28,      25,
*NSET, NSET=NS3
       1,       2,       5,       7,       9,      11,
      13,      15,      17,      19,      21,      23,
*NSET, NSET=NS4
       1,       4,      55,      53,      51,      49,
      47,      44,      43,
*NSET, NSET=NS5
      41,      42,      46,      43,
**
********************************** P R O P E R T I E S ************************
*SHELL SECTION, ELSET=EB4, SECTION INTEGRATION=SIMPSON, MATERIAL=Default-Steel
1.000000e+00
**
*END PART
**
**
**
********************************** E N D   P A R T S **********************************
**
**
********************************** A S S E M B L Y ************************************
**
*ASSEMBLY, NAME=ASSEMBLY1
**
*INSTANCE, NAME=Part-Default_1, PART=Part-Default
*END INSTANCE
**
*END ASSEMBLY
**
**
**
*MATERIAL, NAME = Default-Steel
*ELASTIC, TYPE=ISOTROPIC
2.068000e+05, 2.900000e-01
*DENSITY
7.000000e-06
*CONDUCTIVITY,TYPE=ISO
4.500000e-02
*SPECIFIC HEAT
5.000000e+02
**
**
************************************** H I S T O R Y *************************************
**
*PREPRINT
**
**************************************** S T E P 1 ***************************************
*STEP,INC=100,NAME=Default Set
**
*STATIC
1, 1, 1e-05, 1
**
**
**
**
*END STEP
